// COMSOL Multiphysics 5.3.1.159 model "falling_magnet.mph"
// Magnet Falling Through Copper Tube
// modeldescr_acdc/falling_magnet
// A cylindrical magnet falling through a copper tube induces eddy currents on the tube walls. The eddy currents, in turn, create a magnetic field that opposes the magnetic field of the magnet and induces a braking force that opposes the motion of the magnet. This opposing force increases with increasing velocity. Thus, there is a terminal velocity at which the magnetic braking force equals the force of gravity. The example computes the velocity of the magnet after it is dropped as it reaches its terminal velocity.
// Outline of the model tree

Parameters
  mr = 5[mm]  // Magnet radius
  mh = 10[mm]  // Magnet height
  r_i = 6[mm]  // Tube inner radius
  r_o = 8[mm]  // Tube outer radius
  dm = 7.4[g/(cm)^3]  // Density of magnet
  Br = 1.4[T]  // Remanent flux density

Variables
  var1 "Variables 1"
    m = intmag(2*pi*r*dm)  // Mass of the magnet
    F_g = m*g_const  // Gravitational force on the magnet
  var2 "Variables 2"
    Fz = inttube(-mf.FLtzz*2*pi*r)  // Lorentz force in z direction
    a = (F_g-Fz)/m  // Magnet acceleration

Selections
  sel1: Explicit "Magnet" on domains 2
  sel2: Explicit "Copper Tube" on domains 3-5

Couplings
  intop1: Integration "Integration over Magnet" on selection sel1 | opname = intmag
  intop2: Integration "Integration over Tube" on selection sel2 | opname = inttube

Coordinate systems
  ie1: InfiniteElement "Infinite Element Domain 1" on domains 6 | ScalingType = Cylindrical

Geometry
  geom1 "Geometry 1" (2D axisymmetric, length unit mm)
    r1: Rectangle | pos = {0, -mh/2}; size = {mr, mh}
    fil1: Fillet | point = r1(1) points 2, 3; radius = 1
    r2: Rectangle | pos = {r_i, -50}; size = {r_o-r_i, 100}
    r3: Rectangle | pos = {r_i, -20}; size = {r_o-r_i, 40}
    r4: Rectangle | pos = {0, -50}; size = {30, 100}
    fin: Finalize "Form Union"

Materials
  mat1: Common "Air" on all domains
    def "Basic"
      relpermeability = 1
      relpermittivity = 1
      dynamicviscosity = eta(T[1/K])[Pa*s]
      ratioofspecificheat = 1.4
      electricconductivity = 0[S/m]
      heatcapacity = Cp(T[1/K])[J/(kg*K)]
      density = rho(pA[1/Pa],T[1/K])[kg/m^3]
      thermalconductivity = k(T[1/K])[W/(m*K)]
      soundspeed = cs(T[1/K])[m/s]
      eta: Piecewise | arg = T; pieces = {200.0, 1600.0, -8.38278E-7+8.35717342E-8*T^1-7.69429583E-11*T^2+4.6437266E-14*T^3-1.06585607E-17*T^4}
      Cp: Piecewise | arg = T; pieces = {200.0, 1600.0, 1047.63657-0.372589265*T^1+9.45304214E-4*T^2-6.02409443E-7*T^3+1.2858961E-10*T^4}
      rho: Analytic | expr = pA*0.02897/R_const[K*mol/J]/T; args = {pA, T}; dermethod = manual; argders = {{pA, d(pA*0.02897/R_const/T,pA)}, {T, d(pA*0.02897/R_const/T,T)}}
      k: Piecewise | arg = T; pieces = {200.0, 1600.0, -0.00227583562+1.15480022E-4*T^1-7.90252856E-8*T^2+4.11702505E-11*T^3-7.43864331E-15*T^4}
      cs: Analytic | expr = sqrt(1.4*287*T); args = T; dermethod = manual; argders = {T, d(sqrt(1.4*287*T),T)}
    RefractiveIndex
      n = 1
      ki = 0
  mat2: Common "Copper" on selection sel2
    def "Basic"
      relpermeability = 1
      electricconductivity = 5.998e7[S/m]
      heatcapacity = 385[J/(kg*K)]
      relpermittivity = 1
      emissivity = 0.5
      density = 8940[kg/m^3]
      thermalconductivity = 400[W/(m*K)]
    Enu "Young's modulus and Poisson's ratio"
      youngsmodulus = 126e9[Pa]
      poissonsratio = 0.34
    linzRes "Linearized resistivity"
      rho0 = 1.667e-8[ohm*m]
      alpha = 3.862e-3[1/K]
      Tref = 293.15[K]

Physics
  mf: InductionCurrents "Magnetic Fields" on all domains
    dependent variable A = {Ar, Aphi, Az}
    MeshControl.EnableMeshControl = 1
    al1: AmperesLaw "Ampère's Law 1" (default)
    axi1: AxialSymmetry (default)
    mi1: MagneticInsulation (default)
    init1: init "Initial Values 1" (default)
    al2: AmperesLaw "Ampère's Law 2" on selection sel1 | ConstitutiveRelationH = RemanentFluxDensity; Br = {0, 0, Br}
    vlt1: Velocity "Velocity (Lorentz Term) 1" on selection sel2 | v = {0, 0, v}
    pmc1: PerfectMagneticConductor on boundaries 2, 7, 10, 15, 17, 20, 21
  ge: GlobalEquations "Global ODEs and DAEs"
    ge1: GlobalEquations
      name = v
      equation = d(v,t)-(F_g-Fz)/m
      description = Magnet velocity
      valueType = complex
      DependentVariableQuantity = velocity
      CustomDependentVariableUnit = m
      SourceTermQuantity = acceleration
      CustomSourceTermUnit = m

Mesh
  mesh1 "Mesh 1" (physics-controlled)

Studies
  std1 "Study 1"
    stat: Stationary | solve for = {mf}
    time: Transient "Time Dependent" | tlist = range(0,0.001,0.05); usertol = on; rtol = 0.001

Solver configurations
  sol1 "Solution 1" (study std1)
    v1: Variables "Dependent Variables 1"
    s1: Stationary "Stationary Solver 1"
      dDef: Direct
      fc1: FullyCoupled | linsolver = dDef
    su1: StoreSolution
    v2: Variables "Dependent Variables 2" | initmethod = sol; notsolmethod = sol
    t1: Time "Time-Dependent Solver 1" | tlist = range(0,0.001,0.05)
      dDef: Direct
      fc1: FullyCoupled | linsolver = dDef
  sol2 "Solution Store 1" (study std1)

Datasets
  dset1: Solution | solution = sol1
  dset2: Solution | solution = sol2

Plots
  pg1: PlotGroup2D "2D Plot Group 1" | data = dset1
    surf1: Surface | expr = mf.normB
  pg2: PlotGroup2D "2D Plot Group 2" | data = dset1
    surf1: Surface | expr = mf.normJ; descr = Current density norm
  pg3: PlotGroup1D "1D Plot Group 3" | data = dset1
    glob1: Global "Lorentz Force, Fz" | expr = Fz; unit = N; descr = Lorentz force in z direction
  pg4: PlotGroup1D "1D Plot Group 4" | data = dset1
    glob1: Global "Terminal Velocity" | expr = v
  pg5: PlotGroup1D "1D Plot Group 5" | data = dset1
    glob1: Global "Magnet acceleration" | expr = a; unit = m/s^2; descr = Magnet acceleration