// COMSOL Multiphysics 5.3.1.348 model "test1.mph"
// Outline of the model tree

Parameters
  r_model = 50[mm]
  h_model = 100[mm]
  r_magnet = 1[cm]
  h_magnet = 5[cm]
  magnet_tip = 1.5[cm]

Geometry
  geom1 "Geometry 1" (2D, length unit mm)
    r1: Rectangle "magnet"
      layername = Layer 1
      layer = magnet_tip
      layerbottom = off
      layertop = on
      size = {r_magnet, h_magnet}
    r2: Rectangle "space" | size = {r_model, h_model}
    fin: Finalize "Form Union"

Materials
  mat1: Common "Air" on domains 1-3
    def "Basic"
      relpermeability = 1
      relpermittivity = 1
      dynamicviscosity = eta(T[1/K])[Pa*s]
      ratioofspecificheat = 1.4
      electricconductivity = 0[S/m]
      heatcapacity = Cp(T[1/K])[J/(kg*K)]
      density = rho(pA[1/Pa],T[1/K])[kg/m^3]
      thermalconductivity = k(T[1/K])[W/(m*K)]
      soundspeed = cs(T[1/K])[m/s]
      eta: Piecewise | arg = T; pieces = {200.0, 1600.0, -8.38278E-7+8.35717342E-8*T^1-7.69429583E-11*T^2+4.6437266E-14*T^3-1.06585607E-17*T^4}
      Cp: Piecewise | arg = T; pieces = {200.0, 1600.0, 1047.63657-0.372589265*T^1+9.45304214E-4*T^2-6.02409443E-7*T^3+1.2858961E-10*T^4}
      rho: Analytic | expr = pA*0.02897/R_const[K*mol/J]/T; args = {pA, T}; dermethod = manual; argders = {{pA, d(pA*0.02897/R_const/T,pA)}, {T, d(pA*0.02897/R_const/T,T)}}
      k: Piecewise | arg = T; pieces = {200.0, 1600.0, -0.00227583562+1.15480022E-4*T^1-7.90252856E-8*T^2+4.11702505E-11*T^3-7.43864331E-15*T^4}
      cs: Analytic | expr = sqrt(1.4*287*T); args = T; dermethod = manual; argders = {T, d(sqrt(1.4*287*T),T)}
    RefractiveIndex
      n = 1
      ki = 0
  mat2: Common "Soft Iron (without losses)" on domains 1, 2
    def "Basic"
      electricconductivity = 0[S/m]
      relpermittivity = 1
      relpermeability = 4000
    BHCurve
      normB = BH(normH[m/A])[T]
      normH = sqrt(H1^2+H2^2+H3^2)
      BH: Interpolation
        table = {{0, 0}, {663.146, 1}, {1067.5, 1.1}, {1705.23, 1.2}, {2463.11, 1.3}, {3841.67, 1.4}, {5425.74, 1.5}, {7957.75, 1.6}, {12298.3, 1.7}, {20462.8, 1.8}, {32169.6, 1.9}, {61213.4, 2.0}, {111408, 2.1}, {175070, 2.2}, {261469, 2.3}, {318310, 2.4}}
        extrap = linear
    HBCurve
      normH = HB(normB[1/T])[A/m]
      normB = sqrt(B1^2+B2^2+B3^2)
      HB: Interpolation
        table = {{0, 0}, {1, 663.146}, {1.1, 1067.5}, {1.2, 1705.23}, {1.3, 2463.11}, {1.4, 3841.67}, {1.5, 5425.74}, {1.6, 7957.75}, {1.7, 12298.3}, {1.8, 20462.8}, {1.9, 32169.6}, {2.0, 61213.4}, {2.1, 111408}, {2.2, 175070}, {2.3, 261469}, {2.4, 318310}}
        extrap = linear
    EffectiveBHCurve
      normBeff = BHeff(normHeff[m/A])[T]
      normHeff = sqrt(realdot(H1,H1)+realdot(H2,H2)+realdot(H3,H3))
      BHeff: Interpolation
        table = 
          {0, 0}
          {663.146, 1}
          {1067.5, 1.49439064869}
          {1705.23, 1.94163007382}
          {2463.11, 2.25761949405}
          {3841.67, 2.72975505967}
          {5425.74, 2.87566514896}
          {7957.75, 3.14902923402}
          {12298.3, 3.45293721268}
          {20462.8, 3.7845615956}
          {32169.6, 4.06019591028}
          {61213.4, 4.42177726607}
          {111408, 4.72195400511}
          {175070, 4.94119864969}
          {261469, 5.14465994384}
          {318310, 5.25334603964}
        extrap = linear
    EffectiveHBCurve
      normHeff = HBeff(normBeff[1/T])[A/m]
      normBeff = sqrt(realdot(B1,B1)+realdot(B2,B2)+realdot(B3,B3))
      HBeff: Interpolation
        table = 
          {0, 0}
          {1, 663.146}
          {1.49439064869, 1067.5}
          {1.94163007382, 1705.23}
          {2.25761949405, 2463.11}
          {2.72975505967, 3841.67}
          {2.87566514896, 5425.74}
          {3.14902923402, 7957.75}
          {3.45293721268, 12298.3}
          {3.7845615956, 20462.8}
          {4.06019591028, 32169.6}
          {4.42177726607, 61213.4}
          {4.72195400511, 111408}
          {4.94119864969, 175070}
          {5.14465994384, 261469}
          {5.25334603964, 318310}
        extrap = linear

Physics
  mfnc: MagnetostaticsNoCurrents "Magnetic Fields, No Currents" on all domains
    dependent variable Vm
    mfc1: MagneticFluxConservation (default)
    mi1: MagneticInsulation (default)
    init1: init "Initial Values 1" (default)
    zsp1: ZeroMagneticScalarPotential on boundaries 2, 9

Mesh
  mesh1 "Mesh 1" (physics-controlled)

Studies
  std1 "Study 1"
    stat: Stationary